finish
/clear
/filname,file
/prep7
bb=200
bh=400
Et,1,beam188
Mp,ex,1,2.1e5
mp,prxy,1,0.3
mp,dens,1,7850e-12
sectype,1,beam,rect
secdata,bh,bb
K,1
k,2,0,2000
L,1,2
lesize,all,,,2
lmesh,all
allsel,all
nsel,s,loc,y,0
d,all,all,0
Fk,2,fx,10e3
acel,,9800
allsel,all

/solu
allsel,all
solve
finish

/aux2
file,file,full
hbmat,can_stiff,txt,,ascii,stiffness,yes,yes
!hbmat,mass,txt,,ascii,mass,yes,yes
finish
