!!!!!!!!!!!!!!!!!!!!!!!!!!!!!!!!!!!!!
!!!! Junction Plates
!!!!!!!!!!!!!!!!!!!!!!!!!!!!!!!!!!!!!
finish
/clear
/filname,testJunctionPlate

/prep7
!!!!参数输入
t=0.124      !!板厚度
!b=1.0       !!板宽度
!a=1.26       !!板长度
Ex=3e7  !!弹性模量
Nu=0      !!泊松比
pres=-1   !!荷载N/m

!!!!定义单元类型，实常数，材料特性
et,1,shell63
r,1,t
mp,ex,1,Ex
mp,prxy,1,Nu

!!!建立几何模型
k,1,0,         0, 0
k,2,1.091192,  0, 0.63
k,3,1.091192*2,0, 0
k,4,0,         1, 0
k,5,1.091192,  1, 0.63
k,6,1.091192*2,1, 0
a,1,2,5,4
a,2,3,6,5

!!!单元划分
! AATT, MAT, REAL, TYPE, ESYS, SECN
! Associates element attributes with the selected, unmeshed areas
aatt,1,1,1,0
! AESIZE, ANUM, SIZE, 、
! Specifies the element size to be meshed onto areas.
aesize,all,3*t    !!!设置单元划分尺寸
! AMESH, NA1, NA2, NINC
! Generates nodes and area elements within areas.
! Mesh areas from NA1 to NA2 (defaults to NA1) in steps of NINC (defaults to 1). If NA1 = ALL, NA2 and NINC are ignored
amesh,all

!!!给两加载边施加约束
! DL, LINE, AREA, Lab, Value1, Value2
! Defines DOF constraints on lines.
DL,4, ,all,0

!!!给两非加载边施加约束
! Transfers solid model DOF constraints to the finite element model.
dtran

!!施加x方向约束，消除刚体位移
! NSEL, Type, Item, Comp, VMIN, VMAX, VINC, KABS
! Selects a subset of nodes.
! nsel,s,loc,x,0,0

!!!施加荷载
! Specifies surface loads on lines of an area
! Transfer the solid model surface loads to the finite element model.
! SFL,6,PRES,pres
F,21,fz,-1/6
F,25,fz,-1/6
F,26,fz,-1/3
F,27,fz,-1/3
sftran

!! 保存信息
/file,write,testJunctionPlate1.inp
/input,testJunctionPlate1


!!!首先进行静力解
/solu
! Specifies the analysis type and restart status.
antype,0
! Specifies whether prestress effects are calculated or included.
! pstres,on
solve
finish

!!!后处理
/post1
set,first
! Displays the displaced structure.
pldisp,1
! Displays results as continuous contours.
plnsol,u,z,0,1.0
